# LAMMPS Input Script

# command to run:

# lmp -var F C92x5x10.data -var M H2.lmp -var M2 CH4.lmp -var T diffusion -var NM 4 -var g random -i input_gas.lammps -var RT 1000 -var RS 4500 -var matrix_size 4600
# lmp -var F C92x5x5.data -var M H2.lmp -var M2 CH4.lmp -var T diffusion -var NM 4 -var g random -i input_gas.lammps -var RT 1000 -var RS 4500 -var matrix_size 2300

# F is file, M is molecule, T is task, NM is "num momlecules", g is generation style, RT is "RoundTime" in timesteps (number of timesteps), rs is "number of rounds", cutoff is number of atoms in matrix


# If g is "random", generate all molecules randomly.
# If g is "linear", generate the first molecule at around the center, and generate the second molecule gradually further and further away.
processors 1 1 1
units real
atom_style full

# https://matsci.org/t/problem-with-bond-or-angle-atom-missing/43467/29. Really buried the lede there, jeez.
# timestep 0.25
# create a box first
# include vacuum in the x and y, z should be fixed.

if "${T} == solubility" then "boundary p p f" elif "${T} == diffusion" "boundary p p p" else "jump SELF do_normal"

# no kspace
# Define force field parameters
pair_style lj/charmm/coul/charmm 8.0 10.0 8.0 10.0

bond_style harmonic
angle_style harmonic
dihedral_style opls
improper_style cvff

read_data data/$F

# Set up simulation
run_style verlet
neighbor 2.0 bin
neigh_modify delay 0 every 1 check yes


variable z equal (-1*zlo)
variable x equal xhi
variable y equal yhi

# the limits of where we can teleport the gas molecule
variable h equal (zhi)
variable l equal (zhi+(2*zlo))

# Define output
thermo 1000
thermo_style custom step temp etotal pe ke press vol lx ly lz
if "${T} == solubility" then "jump SELF do_freeze" elif "${T} == diffusion" "jump SELF do_npt" else "jump SELF do_normal"

label do_freeze
#Freeze bottom region
  region edgeR block 0 $x 0 $y 0 $z
  group edge region edgeR
  fix 2 edge setforce NULL 0.0 0.0

# Define the Z
  fix zwalls all wall/reflect zlo EDGE zhi EDGE

  # define mobile region
  region mobileR block 0 $x 0 $y $z $h

  jump SELF after_logic


label do_npt
  fix 3all all npt temp 300.0 300.0 100.0 iso 1.0 1.0 1000.0
  run 1
  unfix 3all
   # define mobile ensemble

  variable xl equal xlo
  variable xh equal xhi
  variable yl equal ylo
  variable yh equal yhi
  variable zl equal zlo
  variable zh equal zhi


  if "${g} == linear" then "jump SELF linear_regions"


  region mobileR block ${xl} ${xh} ${yl} ${yh} ${zl} ${zh}
  region mobileR2 block ${xl} ${xh} ${yl} ${yh} ${zl} ${zh}
  jump SELF after_logic


  label linear_regions
  variable x_mid equal ((${xh}+${xl})/2)
  variable y_mid equal ((${yh}+${yl})/2)
  variable z_mid equal ((${zh}-${zl})*0.55+${zl})

  variable z_mid2 equal ((${zh}-${zl})*0.5+${zl})
  variable x_mid1 equal (${x_mid}+1)
  variable y_mid1 equal (${y_mid}+1)


  print """
  x_mid = ${x_mid}
  x_mid1 = ${x_mid1}
  """
  region mobileR block ${x_mid1} ${x_mid1} ${y_mid1} ${y_mid1}  ${z_mid} ${z_mid}
  region mobileR2 block ${x_mid} ${x_mid} ${y_mid} ${y_mid} ${z_mid} ${z_mid}

  #region mobileR block ${x_mid-1} ${x_mid+1} ${yl} ${yh} ${zl} ${zh}


  jump SELF after_logic


label do_normal
  print """
  Invalid T input
  """

  quit


label after_logic


print """
FILE = $F
Molecule_labe = $M
Task = $T
generation = ${g}
"""

# define ensemble for mobile region
group mobile region mobileR

if "${T} == solubility" then "fix 1 mobile nvt temp 300.0 300.0 100.0" elif "${T} == diffusion" "fix 1 all npt temp 300.0 300.0 100.0 iso 1.0 1.0 1000.0" else "jump SELF do_normal"


minimize 0.0 1.0e-8 1000 100001
run 101

# Define molecule template
molecule penetrantMol molecules/$M

if "${NM} == 1" then "jump SELF done_gen"

molecule penetrantMol2 molecules/${M2}


label done_gen

group penetrant id > ${matrix_size}

if "${NM} == 1" then "jump SELF one_mol_dump"
  dump 1 penetrant custom 1 outputs/penetrant_$F_$M_${NM}_${M2}_${RT}_${RS}_$T.xyz id type x y z vx vy vz fx fy fz mol
  dump 2 all xyz 100 outputs/all_$F_$M_${NM}_${RT}_${RS}_${M2}_$T.xyz
  jump SELF done_dump
  label one_mol_dump
  dump 1 penetrant custom 1 outputs/penetrant_$F_$M_${NM}_${RT}_${RS}_$T.xyz id type x y z vx vy vz fx fy fz mol
  dump 2 all xyz 100 outputs/all_$F_$M_${NM}_${RT}_${RS}_$T.xyz

  label done_dump

  variable natoms equal atoms

  variable num_loops equal ${RS}

  variable i loop ${num_loops}


  label myfirstloop
  variable s equal step

  create_atoms 0 random 1 $s mobileR mol penetrantMol 55 overlap 0.3 maxtry 5000


  if "${NM} == 1" then "jump SELF done_create"


  variable m loop ${NM}
  # 1 for the fist atom
  next m


  label creating_others
  create_atoms 0 random 1 $s mobileR2 mol penetrantMol2 55 overlap 0.3 maxtry 5000

next m
jump SELF creating_others


label done_create
group penetrant id > ${matrix_size}
variable expected equal ${natoms}


if "${T} == solubility" then "fix 3 penetrant nvt temp 300.0 300.0 100.0" elif "${T} == diffusion" "fix 1 all npt temp 300.0 300.0 100.0 iso 1.0 1.0 1000.0" else "jump SELF do_normal"


minimize 0.0 1.0e-4 1000 100003
velocity all set 0.0 0.0 0.0

delete_atoms overlap 0.3 all all

print """
Natoms: ${natoms}
Expectd: ${expected}
"""

if "${natoms} < ${expected}" then "jump SELF jumpError"


print """
The Minimization Stopped at Step = $s
"""
run ${RT}


print """
The Jiggling Stopped at Step = $s
"""
minimize 0.0 1.0e-4 1000 100004


delete_atoms group penetrant
if "${T} == solubility" then "fix 3 penetrant nvt temp 300.0 300.0 100.0" elif "${T} == diffusion" "fix 1 all npt temp 300.0 300.0 100.0 iso 1.0 1.0 1000.0" else "jump SELF do_normal"

next i

if "${g} == linear" then "jump SELF recreate_region"

jump SELF myfirstloop

label recreate_region
variable proportion equal floor(${i}*100/${num_loops})

variable shift equal 0.5-0.45*${proportion}/100
variable z_mid2 equal ((${zh}-${zl})*${shift}+${zl})


print """
proportion = ${proportion}
z_mid = ${z_mid}
z_mid2 = ${z_mid2}
"""

region mobileR2 delete
region mobileR2 block ${x_mid} ${x_mid} ${y_mid} ${y_mid} ${z_mid2} ${z_mid2}

jump SELF myfirstloop


print """
Top of Gas = $h
Bottom of Gas = $l
X = $x
Y = $y
"""

quit

label jumpError
print """
Overlapping atoms
Natoms: ${natoms}
Step: $s
"""

delete_atoms group penetrant
minimize 0.0 1.0e-4 1000 10000003
run 1
jump SELF myfirstloop
